# OpenSim document version 40000
ScaleTool subject01:
  mass: 67.6 [kg]
  height: 1650
  age: 99
  notes: This is an example setup file for scale.exe.
  GenericModelMaker:
    marker_set_file: gait2392_Scale_MarkerSet_ABL_Virtual.xml
  ModelScaler:
    apply: true
    scaling_order: measurements manualScale
    marker_file: C:\Users\emily\OneDrive\Desktop\TestKnee_YA02\UNC_S0_0MO_GAIT_STATIC.trc
    time_range: 0 2
    preserve_mass_distribution: true
    output_model_file: subject01_scaledOnly.osim
    output_scale_file: subject01_scaleSet_applied.xml
    MeasurementSet gait2392:
      Measurement pelvis: apply=true
        MarkerPair: markers=(Mid.PSIS Mid.ASIS)
        BodyScale pelvis: axes=X
      Measurement pelvis: apply=true
        MarkerPair: markers=(RTROCH Mid.Pelvis)
        BodyScale pelvis: axes=Y
      Measurement pelvis: apply=true
        MarkerPair: markers=(LASIS RASIS)
        BodyScale pelvis: axes=Z
      Measurement femur_r: apply=true
        MarkerPair: markers=(RLEPI RMEPI)
        BodyScale femur_r: axes=(X Z)
      Measurement femur_r: apply=true
        MarkerPair: markers=(RTROCH R.KJC)
        BodyScale femur_r: axes=Y
      Measurement tibia_r: apply=true
        MarkerPair: markers=(RLMAL RMMAL)
        BodyScale tibia_r: axes=(X Z)
      Measurement tibia_r: apply=true
        MarkerPair: markers=(R.KJC R.AJC)
        BodyScale tibia_r: axes=Y
      Measurement femur_l: apply=true
        MarkerPair: markers=(LLEPI LMEPI)
        BodyScale femur_l: axes=(X Z)
      Measurement femur_l: apply=true
        MarkerPair: markers=(LTROCH L.KJC)
        BodyScale femur_l: axes=Y
      Measurement tibia_l: apply=true
        MarkerPair: markers=(LLMAL LMMAL)
        BodyScale tibia_l: axes=(X Z)
      Measurement tibia_l: apply=true
        MarkerPair: markers=(L.KJC L.AJC)
        BodyScale tibia_l: axes=Y
      Measurement torso: apply=true
        MarkerPair: markers=(RACRM LACRM)
        BodyScale torso: axes=(X Z)
      Measurement torso: apply=true
        MarkerPair: markers=(STERN Mid.ASIS)
        BodyScale torso: axes=Y
      Measurement talus_r: apply=true
        MarkerPair: markers=(R.Heel_Floor R.MidMT_Floor)
        BodyScale talus_r: axes=X
      Measurement talus_r: apply=true
        MarkerPair: markers=(R.AJC_Floor R.AJC)
        BodyScale talus_r: axes=Y
      Measurement talus_r: apply=true
        MarkerPair: markers=(R1ST R5TH)
        BodyScale talus_r: axes=Z
      Measurement calcn_r: apply=true
        MarkerPair: markers=(R.Heel_Floor R.MidMT_Floor)
        BodyScale calcn_r: axes=X
      Measurement calcn_r: apply=true
        MarkerPair: markers=(R.AJC_Floor R.AJC)
        BodyScale calcn_r: axes=Y
      Measurement calcn_r: apply=true
        MarkerPair: markers=(R1ST R5TH)
        BodyScale calcn_r: axes=Z
      Measurement toes_r: apply=true
        MarkerPair: markers=(R.Heel_Floor R.MidMT_Floor)
        BodyScale toes_r: axes=X
      Measurement toes_r: apply=true
        MarkerPair: markers=(R.AJC_Floor R.AJC)
        BodyScale toes_r: axes=Y
      Measurement toes_r: apply=true
        MarkerPair: markers=(R1ST R5TH)
        BodyScale toes_r: axes=Z
      Measurement talus_l: apply=true
        MarkerPair: markers=(L.Heel_Floor L.MidMT_Floor)
        BodyScale talus_l: axes=X
      Measurement talus_l: apply=true
        MarkerPair: markers=(L.AJC_Floor L.AJC)
        BodyScale talus_l: axes=Y
      Measurement talus_l: apply=true
        MarkerPair: markers=(L1ST L5TH)
        BodyScale talus_l: axes=Z
      Measurement calcn_l: apply=true
        MarkerPair: markers=(L.Heel_Floor L.MidMT_Floor)
        BodyScale calcn_l: axes=X
      Measurement calcn_l: apply=true
        MarkerPair: markers=(L.AJC_Floor L.AJC)
        BodyScale calcn_l: axes=Y
      Measurement calcn_l: apply=true
        MarkerPair: markers=(L1ST L5TH)
        BodyScale calcn_l: axes=Z
      Measurement toes_l: apply=true
        MarkerPair: markers=(L.Heel_Floor L.MidMT_Floor)
        BodyScale toes_l: axes=X
      Measurement toes_l: apply=true
        MarkerPair: markers=(L.AJC_Floor L.AJC)
        BodyScale toes_l: axes=Y
      Measurement toes_l: apply=true
        MarkerPair: markers=(L1ST L5TH)
        BodyScale toes_l: axes=Z
    ScaleSet gait2392_Scale:
      Scale: scales=(1.14724 1.14724 1.14724) segment=femur_r apply=false
      Scale: scales=(0.988523 0.988523 0.988523) segment=tibia_r apply=false
      Scale: scales=(1 1 1) segment=talus_r apply=false
      Scale: scales=(1 1 1) segment=calcn_r apply=false
      Scale: scales=(1 1 1) segment=toes_r apply=false
      Scale: scales=(1.14724 1.14724 1.14724) segment=femur_l apply=false
      Scale: scales=(0.988523 0.988523 0.988523) segment=tibia_l apply=false
      Scale: scales=(1 1 1) segment=talus_l apply=false
      Scale: scales=(1 1 1) segment=calcn_l apply=false
      Scale: scales=(1 1 1) segment=toes_l apply=false
  MarkerPlacer:
    apply: true
    marker_file: C:\Users\emily\OneDrive\Desktop\TestKnee_YA02\UNC_S0_0MO_GAIT_STATIC.trc
    time_range: 0 1
    output_model_file: C:\Users\richa\Documents\OpenSim 4.0\Metabolix\exp\YA01\OpenSim\ScaleFiles\YA01_SCALED_new.osim
    max_marker_movement: 5
    IKTaskSet gait2392_Scale:
      IKMarkerTask RACRM: apply=true weight=1
      IKMarkerTask LACRM: apply=true weight=1
      IKMarkerTask STERN: apply=true weight=1
      IKMarkerTask L4L5: apply=true weight=5
      IKMarkerTask RASIS: apply=true weight=5
      IKMarkerTask LASIS: apply=true weight=5
      IKMarkerTask RPSIS: apply=true weight=5
      IKMarkerTask LPSIS: apply=true weight=5
      IKMarkerTask COCCX: apply=true weight=3
      IKMarkerTask RTHIGH: apply=false weight=0.75
      IKMarkerTask RLEPI: apply=true weight=5
      IKMarkerTask RMEPI: apply=true weight=5
      IKMarkerTask RTIB: apply=false weight=0.75
      IKMarkerTask RLMAL: apply=true weight=5
      IKMarkerTask RMMAL: apply=true weight=5
      IKMarkerTask RCALC: apply=true weight=5
      IKMarkerTask R5TH: apply=true weight=5
      IKMarkerTask R1ST: apply=true weight=5
      IKMarkerTask LTHIGH: apply=false weight=0.75
      IKMarkerTask LLEPI: apply=true weight=5
      IKMarkerTask LMEPI: apply=true weight=5
      IKMarkerTask LTIB: apply=false weight=0.75
      IKMarkerTask LLMAL: apply=true weight=5
      IKMarkerTask LMMAL: apply=true weight=5
      IKMarkerTask LCALC: apply=true weight=5
      IKMarkerTask L1ST: apply=true weight=5
      IKMarkerTask L5TH: apply=true weight=5
