# OpenSim document version 40000
# These weighting values are used from Schellenberg et al. 2017. https://doi.org/10.1080/10255842.2017.1295305
InverseKinematicsTool:
  results_directory: ./
  model_file: MODEL_FILE
  constraint_weight: Inf
  accuracy: 1e-5
  marker_file: C:\Users\richa\Documents\OpenSim 4.0\Metabolix\exp\YA01\OpenSim\Fm20_1_OpenSim.trc
  time_range: 0 10
  report_errors: true
  output_motion_file: .\Fm20_1_TEST_OpenSim_IK.mot
  report_marker_locations: true
  IKTaskSet:
    IKMarkerTask RACRM: apply=true weight=1
    IKMarkerTask LACRM: apply=true weight=1
    IKMarkerTask RASIS: apply=true weight=2
    IKMarkerTask LASIS: apply=true weight=2
    IKMarkerTask RPSIS: apply=true weight=1
    IKMarkerTask LPSIS: apply=true weight=1
    IKMarkerTask COCC: apply=true weight=1
    IKMarkerTask RTHIGH: apply=true weight=0.75
    IKMarkerTask RLEPI: apply=true weight=2
    IKMarkerTask RMEPI: apply=false weight=2
    IKMarkerTask RTIB: apply=true weight=0.75
    IKMarkerTask RLMAL: apply=true weight=1
    IKMarkerTask RMMAL: apply=false weight=3
    IKMarkerTask RCALC: apply=true weight=3
    IKMarkerTask R5TH: apply=true weight=3
    IKMarkerTask R1ST: apply=true weight=3
    IKMarkerTask LTHIGH: apply=true weight=0.75
    IKMarkerTask LLEPI: apply=true weight=2
    IKMarkerTask LMEPI: apply=false weight=2
    IKMarkerTask LTIB: apply=true weight=0.75
    IKMarkerTask LLEPI: apply=true weight=1
    IKMarkerTask LMEPI: apply=false weight=3
    IKMarkerTask LCALC: apply=true weight=3
    IKMarkerTask L5TH: apply=true weight=3
    IKMarkerTask L1ST: apply=true weight=3
    IKMarkerTask STERN: apply=true weight=1
    IKMarkerTask L4L5: apply=true weight=1
