# OpenSim document version 20302
MarkerSet gait2392_Scale:
  Marker RACRM: torso (-0.003 0.425 0.13) fixed=true
  Marker LACRM: torso (-0.003 0.425 -0.13) fixed=true
  Marker STERN: torso (0.0977261 0.313492 0)
  Marker RASIS: pelvis (0.02 0.03 0.128) fixed=true
  Marker LASIS: pelvis (0.02 0.03 -0.128) fixed=true
  Marker RPSIS: pelvis (-0.16 0.03 0.08) fixed=true
  Marker LPSIS: pelvis (-0.16 0.03 -0.08) fixed=true
  Marker COCCX: pelvis (-0.16 0.02 0) fixed=true
  Marker RTHIGH: femur_r (0.0825676 -0.2 -0.00449917)
  Marker RLEPI: femur_r (0 -0.404 0.0625) fixed=true
  Marker RMEPI: femur_r (0 -0.404 -0.0625) fixed=true
  Marker RTIB: tibia_r (0.0461817 -0.217892 -0.00983674)
  Marker RLMAL: tibia_r (-0.005 -0.41 0.053) fixed=true
  Marker RMMAL: tibia_r (0.006 -0.3888 -0.038) fixed=true
  Marker RCALC: calcn_r (-0.02 0.02 0) fixed=true
  Marker R5TH: calcn_r (0.18 0 0.065) fixed=true
  Marker R1ST: calcn_r (0.18 0.005 -0.04) fixed=true
  Marker LTHIGH: femur_l (0.0825676 -0.2 -0.00449917)
  Marker LLEPI: femur_l (0 -0.404 -0.0625) fixed=true
  Marker LMEPI: femur_l (0 -0.404 0.0625) fixed=true
  Marker LTIB: tibia_l (0.0461817 -0.217892 -0.00983674)
  Marker LLMAL: tibia_l (-0.005 -0.41 -0.053) fixed=true
  Marker LMMAL: tibia_l (0.006 -0.3888 0.038) fixed=true
  Marker LCALC: calcn_l (-0.02 0.02 0) fixed=true
  Marker L5TH: calcn_l (0.18 0 -0.065) fixed=true
  Marker L1ST: calcn_l (0.18 0.005 0.04) fixed=true
  # Virtual Markers and Joint Centers
  Marker L.HJC: pelvis (-0.0707 -0.0661 -0.0835)
  Marker R.HJC: pelvis (-0.0707 -0.0661 0.0835)
  Marker Mid.ASIS: pelvis (0.02 0.025 0)
  Marker Mid.PSIS: pelvis (-0.16 0.03 0)
  Marker Mid.HJC: pelvis (-0.0707 -0.0661 0)
  Marker Mid.Pelvis: pelvis (-0.07 0.025 0)
  Marker L.KJC: femur_l (0 -0.404 0)
  Marker R.KJC: femur_r (0 -0.404 0)
  Marker L.AJC: tibia_l (0.0005 -0.3994 -0.0075)
  Marker R.AJC: tibia_r (0.0005 -0.3994 0.0075)
  Marker L.AJC_Floor: tibia_l (0.0005 -0.487 -0.0075)
  Marker R.AJC_Floor: tibia_r (0.0005 -0.487 0.0075)
  Marker L.Heel_Floor: calcn_l (-0.02 -0.015 0)
  Marker R.Heel_Floor: calcn_r (-0.02 -0.015 0)
  Marker L.MT1_Floor: calcn_l (0.18 -0.015 0.04)
  Marker R.MT1_Floor: calcn_r (0.18 -0.015 -0.04)
  Marker L.MT5_Floor: calcn_l (0.18 -0.015 -0.065)
  Marker R.MT5_Floor: calcn_r (0.18 -0.015 0.065)
  Marker L.MidMT_Floor: calcn_l (0.18 -0.015 -0.0125)
  Marker R.MidMT_Floor: calcn_r (0.18 -0.015 0.0125)
